units real
atom_style full

dimension 3
boundary p p p

bond_style hybrid harmonic
angle_style hybrid harmonic
dihedral_style hybrid charmm multi/harmonic
special_bonds lj 0.0 0.0 0.5 coul 0.0 0.0 0.83333333

read_data complex_converted.lmp

pair_style lj/cut/coul/long 9.0 9.0
pair_modify tail yes
kspace_style pppm 1.0e-5

pair_coeff 1 1   0.2100000   2.9599219
pair_coeff 2 2   0.0860000   3.3996695
pair_coeff 3 3   0.1700000   3.2499985
pair_coeff 4 4   0.1094000   3.3996695
pair_coeff 5 5   0.0157000   2.2931733
pair_coeff 6 6   0.0860000   3.3996695
pair_coeff 7 7   0.0860000   3.3996695
pair_coeff 8 8   0.1700000   3.2499985
pair_coeff 9 9   0.1700000   3.2499985
pair_coeff 10 10   0.2104000   3.0664734
pair_coeff 11 11   0.1700000   3.0000123
pair_coeff 12 12   0.0150000   2.5996425
pair_coeff 13 13   0.0150000   2.5105526
pair_coeff 14 14   0.0157000   2.6495328
pair_coeff 15 15   0.0157000   1.9599772
pair_coeff 16 16   0.0157000   2.4713530
pair_coeff 17 17   0.0157000   1.0690785
pair_coeff 18 18   0.0000000   0.0000000
pair_coeff 19 19   0.0355910   4.4776570
pair_coeff 20 20   0.0874393   2.4392807
pair_coeff 21 21   0.1520000   3.1507524
pair_coeff 22 22   0.0000000   0.0000000

pair_modify mix arithmetic

fix settle all shake 0.000001 100 0 t 21 22 a 433 434 435 436 437 438 439 440 441 442 &
 443 444 445 446 447 448 449 450 451 452 &
 453 454 455 456 457 458 459 460 461 462 &
 463 464 465 466 467 468 469 470 471 472 &
 473 474 475 476 477 478 479 480 481 482 &
 483 484 485 486 487 488 489 490 491 492 &
 493 494 495 496 497 498 499 500 501 502 &
 503 504 505 506 507 508 509 510 511 512 &
 513 514 515 516 517 518 519 520 521 522 &
 523 524 525 526 527 528 529 530 531 532 &
 533 534 535 536 537 538 539 540 541 542 &
 543 544 545 546 547 548 549 550 551 552 &
 553 554 555 556 557 558 559 560 561 562 &
 563 564 565 566 567 568 569 570 571 572 &
 573 574 575 576 577 578 579 580 581 582 &
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 2573 2574 2575 2576 2577 2578 2579 2580 2581 2582 &

thermo_style custom ebond eangle edihed eimp epair evdwl ecoul elong etail pe

run 0
