units real
atom_style full

dimension 3
boundary p p p

bond_style hybrid harmonic
angle_style hybrid harmonic
dihedral_style hybrid charmm multi/harmonic
special_bonds lj 0.0 0.0 0.5 coul 0.0 0.0 0.833333

read_data solvent_converted.lmp

pair_style lj/cut/coul/long 14.0 14.0
pair_modify tail yes
kspace_style pppm 1e-8

pair_coeff 1 1   0.0860000   3.3996700
pair_coeff 2 2   0.0860000   3.3996700
pair_coeff 3 3   0.1094001   3.3996700
pair_coeff 4 4   0.1700000   3.2500000
pair_coeff 5 5   0.1700000   3.2500000
pair_coeff 6 6   0.2104001   3.0664700
pair_coeff 7 7   0.1700000   3.0000100
pair_coeff 8 8   0.0150000   2.5996400
pair_coeff 9 9   0.0150000   2.5105500
pair_coeff 10 10   0.0157000   2.6495300
pair_coeff 11 11   0.0157000   1.9599800
pair_coeff 12 12   0.0157000   2.4713500
pair_coeff 13 13   0.0157000   1.0690800
pair_coeff 14 14   0.0000000   0.0000000
pair_coeff 15 15   0.0355911   4.4776600
pair_coeff 16 16   0.0874393   2.4392800
pair_coeff 17 17   0.1520000   3.1507500
pair_coeff 18 18   0.0000000   0.0000000

pair_modify mix arithmetic

fix settle all shake 0.000001 100 0 t 17 18 a 97 98 99 100 101 102 103 104 105 106 &
 107 108 109 110 111 112 113 114 115 116 &
 117 118 119 120 121 122 123 124 125 126 &
 127 128 129 130 131 132 133 134 135 136 &
 137 138 139 140 141 142 143 144 145 146 &
 147 148 149 150 151 152 153 154 155 156 &
 157 158 159 160 161 162 163 164 165 166 &
 167 168 169 170 171 172 173 174 175 176 &
 177 178 179 180 181 182 183 184 185 186 &
 187 188 189 190 191 192 193 194 195 196 &
 197 198 199 200 201 202 203 204 205 206 &
 207 208 209 210 211 212 213 214 215 216 &
 217 218 219 220 221 222 223 224 225 226 &
 227 228 229 230 231 232 233 234 235 236 &
 237 238 239 240 241 242 243 244 245 246 &
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 1857 1858 1859 1860 1861 1862 1863 1864 1865 1866 &

thermo_style custom ebond eangle edihed eimp epair evdwl ecoul elong etail pe

run 0
