units real
atom_style full

dimension 3
boundary p p p

bond_style hybrid harmonic
angle_style hybrid harmonic
dihedral_style hybrid charmm multi/harmonic
special_bonds lj 0.0 0.0 0.5 coul 0.0 0.0 0.833333

read_data complex_converted.lmp

pair_style lj/cut/coul/long 14.0 14.0
pair_modify tail yes
kspace_style pppm 1e-8

pair_coeff 1 1   0.2100000   2.9599200
pair_coeff 2 2   0.0860000   3.3996700
pair_coeff 3 3   0.1700000   3.2500000
pair_coeff 4 4   0.1094001   3.3996700
pair_coeff 5 5   0.0157000   2.2931700
pair_coeff 6 6   0.0860000   3.3996700
pair_coeff 7 7   0.1700000   3.2500000
pair_coeff 8 8   0.1700000   3.0000100
pair_coeff 9 9   0.0150000   2.5996400
pair_coeff 10 10   0.0157000   2.6495300
pair_coeff 11 11   0.0157000   1.9599800
pair_coeff 12 12   0.0157000   2.4713500
pair_coeff 13 13   0.0355911   4.4776600
pair_coeff 14 14   0.0874393   2.4392800
pair_coeff 15 15   0.1520000   3.1507500
pair_coeff 16 16   0.0000000   0.0000000

pair_modify mix arithmetic

fix settle all shake 0.000001 100 0 t 15 16 a 520 521 522 523 524 525 526 527 528 529 &
 530 531 532 533 534 535 536 537 538 539 &
 540 541 542 543 544 545 546 547 548 549 &
 550 551 552 553 554 555 556 557 558 559 &
 560 561 562 563 564 565 566 567 568 569 &
 570 571 572 573 574 575 576 577 578 579 &
 580 581 582 583 584 585 586 587 588 589 &
 590 591 592 593 594 595 596 597 598 599 &
 600 601 602 603 604 605 606 607 608 609 &
 610 611 612 613 614 615 616 617 618 619 &
 620 621 622 623 624 625 626 627 628 629 &
 630 631 632 633 634 635 636 637 638 639 &
 640 641 642 643 644 645 646 647 648 649 &
 650 651 652 653 654 655 656 657 658 659 &
 660 661 662 663 664 665 666 667 668 669 &
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 2640 2641 2642
thermo_style custom ebond eangle edihed eimp epair evdwl ecoul elong etail pe

run 0
