units real
atom_style full

dimension 3
boundary p p p

bond_style hybrid harmonic
angle_style hybrid harmonic
dihedral_style hybrid charmm multi/harmonic
special_bonds lj 0.0 0.0 0.5 coul 0.0 0.0 0.833333

read_data solvent_converted.lmp

pair_style lj/cut/coul/long 14.0 14.0
pair_modify tail yes
kspace_style pppm 1e-8

pair_coeff 1 1   0.0860000   3.3996700
pair_coeff 2 2   0.1094001   3.3996700
pair_coeff 3 3   0.1700000   3.2500000
pair_coeff 4 4   0.1700000   3.0000100
pair_coeff 5 5   0.0150000   2.5996400
pair_coeff 6 6   0.0157000   2.6495300
pair_coeff 7 7   0.0157000   1.9599800
pair_coeff 8 8   0.0157000   2.4713500
pair_coeff 9 9   0.0355911   4.4776600
pair_coeff 10 10   0.0874393   2.4392800
pair_coeff 11 11   0.1520000   3.1507500
pair_coeff 12 12   0.0000000   0.0000000

pair_modify mix arithmetic

fix settle all shake 0.000001 100 0 t 11 12 a 184 185 186 187 188 189 190 191 192 193 &
 194 195 196 197 198 199 200 201 202 203 &
 204 205 206 207 208 209 210 211 212 213 &
 214 215 216 217 218 219 220 221 222 223 &
 224 225 226 227 228 229 230 231 232 233 &
 234 235 236 237 238 239 240 241 242 243 &
 244 245 246 247 248 249 250 251 252 253 &
 254 255 256 257 258 259 260 261 262 263 &
 264 265 266 267 268 269 270 271 272 273 &
 274 275 276 277 278 279 280 281 282 283 &
 284 285 286 287 288 289 290 291 292 293 &
 294 295 296 297 298 299 300 301 302 303 &
 304 305 306 307 308 309 310 311 312 313 &
 314 315 316 317 318 319 320 321 322 323 &
 324 325 326 327 328 329 330 331 332 333 &
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 2344 2345 2346 2347
thermo_style custom ebond eangle edihed eimp epair evdwl ecoul elong etail pe

run 0
