units real
atom_style full

dimension 3
boundary p p p

bond_style hybrid harmonic
angle_style hybrid harmonic
dihedral_style hybrid charmm multi/harmonic
special_bonds lj 0.0 0.0 0.5 coul 0.0 0.0 0.833333

read_data solvent_converted.lmp

pair_style lj/cut/coul/long 14.0 14.0
pair_modify tail yes
kspace_style pppm 1e-8

pair_coeff 1 1   0.0860000   3.3996700
pair_coeff 2 2   0.0860000   3.3996700
pair_coeff 3 3   0.0860000   3.3996700
pair_coeff 4 4   0.1094001   3.3996700
pair_coeff 5 5   0.2100000   2.9599200
pair_coeff 6 6   0.0150000   2.5996400
pair_coeff 7 7   0.0157000   2.6495300
pair_coeff 8 8   0.0874393   2.4392800
pair_coeff 9 9   0.1520000   3.1507500
pair_coeff 10 10   0.0000000   0.0000000

pair_modify mix arithmetic

fix settle all shake 0.000001 100 0 t 9 10 a 46 47 48 49 50 51 52 53 54 55 &
 56 57 58 59 60 61 62 63 64 65 &
 66 67 68 69 70 71 72 73 74 75 &
 76 77 78 79 80 81 82 83 84 85 &
 86 87 88 89 90 91 92 93 94 95 &
 96 97 98 99 100 101 102 103 104 105 &
 106 107 108 109 110 111 112 113 114 115 &
 116 117 118 119 120 121 122 123 124 125 &
 126 127 128 129 130 131 132 133 134 135 &
 136 137 138 139 140 141 142 143 144 145 &
 146 147 148 149 150 151 152 153 154 155 &
 156 157 158 159 160 161 162 163 164 165 &
 166 167 168 169 170 171 172 173 174 175 &
 176 177 178 179 180 181 182 183 184 185 &
 186 187 188 189 190 191 192 193 194 195 &
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 1246 1247 1248 1249 1250 1251 1252 1253 1254 1255 &

thermo_style custom ebond eangle edihed eimp epair evdwl ecoul elong etail pe

run 0
